*Heading
** Job name: ADCB_AbqImp Model name: Model-1
** Generated by: Abaqus/CAE 2018
*Preprint, echo=NO, model=NO, history=NO, contact=NO
**
** PARTS
**
*Part, name=Part-1
*Node
      1,          60.,           0.,   6.80000019
      2,          60.,           1.,   6.80000019
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*Element, type=C3D8I
 1, 104, 107, 587, 549,   1,   2,  25,  62
 2, 549, 587, 588, 550,  62,  25,  26,  61
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*Element, type=COH3D8
541,  17,  20, 386, 385,   5,   8, 109, 227
542, 385, 386, 387, 384, 227, 109, 110, 226
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*Nset, nset=Bulk-1
   13,   14,   15,   16,   17,   18
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*Elset, elset=Bulk-1
 181, 182, 183, 184, 185, 186
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*Nset, nset=Bulk-2
   1,   2,   3,   4,   5,   6
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*Elset, elset=Bulk-2, generate
   1,  180,    1
*Nset, nset=Cz
   5,   8,   9,  11,  17,  18
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*Elset, elset=Cz, generate
 541,  580,    1
*Nset, nset=Top
 3, 4
*Elset, elset=Top
 20,
*Nset, nset=Bot
 22, 23
*Elset, elset=Bot
 741,
*Nset, nset=XEdges
   1,   2,   5,   8,   9,  10
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*Elset, elset=XEdges
  61,  62,  63,  64,  65,  66
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*Nset, nset=Sides, generate
    1,  1708,     1
*Elset, elset=Sides
   1,   2,   3,   4,   5,   6
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*Orientation, name=Ori-2
1., 0., 0., 0., 1., 0.
1, 0.
** Section: Section-3
*Solid Section, elset=Bulk-2, orientation=Ori-2, material=Material-3
,
*Orientation, name=Ori-1
1., 0., 0., 0., 1., 0.
1, 0.
** Section: Section-1
*Solid Section, elset=Bulk-1, orientation=Ori-1, material=Material-1
,
** Section: Section-2
*Cohesive Section, elset=Cz, material=Material-2, response=TRACTION SEPARATION
,
*End Part
**
**
** ASSEMBLY
**
*Assembly, name=Assembly
**
*Instance, name=Part-1-1, part=Part-1
*End Instance
**
*Node
      1,           0.,          0.5,           0.
*Node
      2,           0.,          0.5,   6.80000019
*Nset, nset=BotL
 1,
*Nset, nset=TopL
 2,
*Surface, type=NODE, name=Part-1-1_Bot_CNS_, internal
Part-1-1.Bot, 1.
*Surface, type=NODE, name=Part-1-1_Top_CNS_, internal
Part-1-1.Top, 1.
** Constraint: Constraint-1
*Coupling, constraint name=Constraint-1, ref node=BotL, surface=Part-1-1_Bot_CNS_
*Kinematic
1, 1
2, 2
3, 3
** Constraint: Constraint-2
*Coupling, constraint name=Constraint-2, ref node=TopL, surface=Part-1-1_Top_CNS_
*Kinematic
1, 1
2, 2
3, 3
*End Assembly
**
** MATERIALS
**
*Material, name=Material-1
*Density
 1.8e-09,
*Elastic, type=ENGINEERING CONSTANTS
109000.,8819.,8819., 0.34, 0.34, 0.38,4315.,4315.
3200.,
*Material, name=Material-2
*Damage Initiation, criterion=QUADS
 4.2,42.,42.
*Damage Evolution, type=ENERGY, mixed mode behavior=BK, power=2.81032
 0.42, 4.2, 4.2
*Density
 1.8e-09,
*Elastic, type=TRACTION
1250.,1250.,1250.
*Material, name=Material-3
*Density
 1.8e-09,
*Elastic, type=ENGINEERING CONSTANTS
109000.,8819.,8819., 0.34, 0.34, 0.38,4315.,4315.
3200.,
** ----------------------------------------------------------------
**
** STEP: Step-1
**
*Step, name=Step-1, nlgeom=YES, inc=1000000000, unsymm=YES
*Dynamic,application=QUASI-STATIC,initial=NO
0.1,1.,1e-05,0.1
**
** BOUNDARY CONDITIONS
**
** Name: BC-1 Type: Displacement/Rotation
*Boundary
BotL, 1, 1
BotL, 3, 3
** Name: BC-2 Type: Displacement/Rotation
*Boundary
TopL, 1, 1
TopL, 3, 3, 20.
** Name: BC-3 Type: Displacement/Rotation
*Boundary
Part-1-1.Sides, 2, 2
**
** CONTROLS
**
*Controls, reset
*Controls, parameters=time incrementation
200, 200, , 200, 200, , 20, 50, , ,
*Controls, parameters=line search
4, 4., 0.25, , 0.15
*Controls, parameters=field, field=displacement
0.05, 1., , , , , ,
**
** OUTPUT REQUESTS
**
*Restart, write, frequency=0
**
** FIELD OUTPUT: F-Output-1
**
*Output, field
*Node Output
RF, U
*Element Output, directions=YES
EEQUT, LE, S, SDEG, SDV, SEQUT, STATUS, TE, TEEQ, TEVOL
**
** HISTORY OUTPUT: H-Output-1
**
*Output, history, frequency=1
*Node Output, nset=TopL
RT, UT
*End Step
